## Träger & Querschnitt
a*b_Steg = 15000 m^2
a := 5 m
b_Steg := 300 mm
f(x) := x^2 + 1
f(3) = 10
i := 0 .. 4
v[i] := i^2
v = [0; 1; 4; 9; 16]
g(x) :=
    -1 if x < 0
    1 otherwise
g(-2) + 10*g(5) = 9
k*3 = 6
k ≡ 2
A := [1, 2; 3, 4]
A[0, 1] = 2
sum(j^2, j = 1 .. 10) = 385
